units real
boundary p p p

atom_style full
bond_style harmonic
angle_style harmonic
special_bonds lj/coul 0.0 0.0 0.5

pair_style lj/cut/coul/long 12.0 12.0
kspace_style pppm 1.0e-3

read_data data.swm4-ndp

pair_coeff    1    1      0.210939     3.183950  # ODw ODw
pair_coeff    *   2*      0.000000     0.0

group ATOMS type 1:3
group CORES type 1
group DRUDES type 4

variable TK equal 300.0
variable TDK equal 1.0
variable PBAR equal 1.0

neighbor 2.0 bin

timestep 1.0

fix DRUDE all drude Core NoPol NoPol Drude

velocity ATOMS create ${TK} 12345
velocity DRUDES create ${TDK} 12345

delete_bonds ATOMS multi

compute TATOM ATOMS temp/com

fix DTDIR all drude/transform/direct
fix RIGID ATOMS rigid/npt/small molecule temp ${TK} ${TK} 100 iso ${PBAR} ${PBAR} 500
fix_modify RIGID temp TATOM press thermo_press
fix NVT DRUDES nvt temp ${TDK} ${TDK} 100.0
fix DTINV all drude/transform/inverse temp

thermo_style custom step cpu etotal ke pe ebond eangle evdwl ecoul elong press vol temp f_DTINV[1] f_DTINV[2]
thermo 20

run 2000
